# Скорости : | Ускорения : | Плечо нагрузки :
ω_1 := 0.523
ε_1 := 0.26
m_н := 8  # кг
l_1 := 1.5
ω_2 := 0.523
ε_2 := 0.26
K_k1 := 2.5
l_2 := 1.5
ε_3 := 0.26
K_k2 := 1.5
l_3 := 0.75
ω_3 := 0.523
ε_4 := 1.047
K_k3 := 1.5
l_4 - 0
ω_4 := 1.047
K_k4 := 1.5
d_н := 0.3  # диаметр урны
# Масса конструкции:
# Плечо конструкции:
l_н := 0.75  # длина урны
m_k1 := m_н*K_k1 = 20
l_k1 := l_1/2 = 0.75
m_k2 := m_н*K_k2 = 12
l_k2 := l_2/2 = 0.75
m_k3 := m_н*K_k3 = 12
l_k3 := l_3/2 = 0.375
m_k4 := m_н*K_k4 = 12
l_k4 := 0
# Момент инерции нагрузки:
# Момент инерции конструкции:
J_н1 := m_н*l_1^2 = 18
J_k1 := m_k1*l_k1^2 = 11.25
J_k2 := m_k2*l_k2^2 = 6.75
J_н2 := m_н*l_2^2 = 18
J_k3 := m_k3*l_k3^2 = 1.6875
J_н3 := m_н*l_3^2 = 4.5
J_н4 := (1/4)*m_н*(d_н/2)^2 + (1/12)*m_н*(l_н/2) = 0.295
J_k4 := J_н4*K_k4 = 0.4425
# Силовое воздействие:
Q_1 := m_н*g*l_1 + m_н*g*l_k1 + (J_н1 + J_k1)*ε_1  # error: Значение имеет единицы измерения: Unitless, а должно иметь единицы измерения: время^-2 · длина.
η := 0.7
K_p := 1.5
P_1 := (Q_1*K_p*ω_1)/η  # error: Эта переменная не определена.
